*HEADING
Acrylic Pan graded C3D20R modal model
*NODE
1,0.00000000,0.00000000,-2.50000000
2,25.00000000,0.00000000,-2.50000000
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*ELEMENT,TYPE=C3D20R,ELSET=SOLID
1,1,2,3,4,5,6,7,8,9,10,11,12,13,14,15
16,17,18,19,20
2,2,21,22,3,6,23,24,7,25,26,27,10,28,29,30
14,18,31,32,19
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*NSET,NSET=FIXED
105,106,107,108,110,113
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*NSET,NSET=TOPSURFACE
2714,2715,2716,2717,2718,2719
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*NSET,NSET=OBSERVATION
3198,3214,3238,3262,3696,3712,3724,3736,3760,4028,4044,4068,4092
*NSET,NSET=SENSOR
3724
*NSET,NSET=HIT_area01
3198
*NSET,NSET=HIT_area02
3214
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*MATERIAL,NAME=PMMA
*ELASTIC
3200.,0.35
*DENSITY
1.18E-9
*SOLID SECTION,ELSET=SOLID,MATERIAL=PMMA
*BOUNDARY
FIXED,1,3
*STEP
*FREQUENCY,STORAGE=YES,SOLVER=SPOOLES
30,0.,1200.
*CLOAD
3198,3,0.0
3214,3,0.0
3238,3,0.0
3262,3,0.0
3696,3,0.0
3712,3,0.0
3736,3,0.0
3760,3,0.0
4028,3,0.0
4044,3,0.0
4068,3,0.0
4092,3,0.0
*NODE FILE,NSET=TOPSURFACE,GLOBAL=YES
U
*NODE PRINT,NSET=OBSERVATION,GLOBAL=YES
U
*END STEP
