*HEADING
Acrylic Pan graded C3D20R modal model
*NODE
1,0.00000000,0.00000000,-2.50000000
2,25.00000000,0.00000000,-2.50000000
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*ELEMENT,TYPE=C3D20R,ELSET=SOLID
1,1,2,3,4,5,6,7,8,9,10,11,12,13,14,15
16,17,18,19,20
2,2,21,22,3,6,23,24,7,25,26,27,10,28,29,30
14,18,31,32,19
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*NSET,NSET=FIXED
105,106,107,108,110,113
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*NSET,NSET=TOPSURFACE
2714,2715,2716,2717,2718,2719
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*NSET,NSET=OBSERVATION
3198,3214,3238,3262,3696,3712,3724,3736,3760,4028,4044,4068,4092
*NSET,NSET=SENSOR
3724
*NSET,NSET=HIT_area01
3198
*NSET,NSET=HIT_area02
3214
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*NSET,NSET=HIT_area11
4068
*NSET,NSET=HIT_area12
4092
*MATERIAL,NAME=PMMA
*ELASTIC
3200.,0.35
*DENSITY
1.18E-9
*SOLID SECTION,ELSET=SOLID,MATERIAL=PMMA
*BOUNDARY
FIXED,1,3
*AMPLITUDE,NAME=IMPULSE,TIME=TOTAL TIME
0.,0.,0.00015625,6400.,0.0003125,0.,0.320000,0.
*STEP,INC=10000
*MODAL DYNAMIC,DIRECT
0.00015625,0.320000
*MODAL DAMPING,MODAL=DIRECT
1,30,0.012
*CLOAD,AMPLITUDE=IMPULSE
HIT_area11,3,1.0
*NODE PRINT,NSET=SENSOR,GLOBAL=YES,FREQUENCY=1
U
*END STEP
